OpenVSP model (file version 5), 10 components.
Geometry view with OpenVSP parameter names; values to 6 digits, angles in degrees, lengths in the model's unit.
Overall bounding box: X_Min=0 X_Len=31.5 Y_Min=-31.9657 Y_Len=63.9315 Z_Min=-3.03718 Z_Len=7.9475

Fuselage "rightfuse"
  location (X Y Z) 0 7 0, rotation 0 0 0
  bounding box size 30 4.04928 4.06144
  Design: Length=30
  cross sections:
    n  XLocPercent  YLocPercent  ZLocPercent  shape
    0  0            0            0.0185185    point
    1  0.125        0            0.0462963    general fuselage BotStr=1.5 BotTanAngle=60 CornerRad=0 Height=3.7 LowStr=0.83 MaxWidthLoc=-0.375 TopStr=0.83 TopTanAngle=50 UpStr=0.83 Width=3.7
    2  0.25         0            0.0416667    general fuselage BotStr=1.5 BotTanAngle=60 CornerRad=0 Height=3.1 LowStr=0.83 MaxWidthLoc=-0.375 TopStr=0.83 TopTanAngle=50 UpStr=0.83 Width=3.5
    3  0.5          0            0.03         general fuselage BotStr=1.5 BotTanAngle=60 CornerRad=0 Height=2 LowStr=0.83 MaxWidthLoc=-0.25 TopStr=0.83 TopTanAngle=60 UpStr=0.83 Width=2.5
    4  0.75         0            0.03         as above
    5  1            0            0.03         as above

Propeller "rprop"
  location (X Y Z) 30.5 7 0.75, rotation 0 0 0
  bounding box size 0.370302 6.93829 7.27972
  Design: Diameter=7.5 NumBlade=5 Beta34=20 UseBeta34Flag=1 Feather=0 Rotate=0 Precone=0 ReverseFlag=0 FoldAngle=0 PropMode=0 AF=152.158 CLi=0.540239 Chord=0.175417 Solidity=0.279184 ConstructXoC=0.5 FeatherAxisXoC=0.5 FeatherOffsetXoC=0
  cross sections:
    n  RadiusFrac  shape
    0  0.1         ellipse Ellipse_Height=0.15 Ellipse_Width=0.3
    1  0.4         NACA 16-series Chord=0.6672 IdealCl=0.7 ThickChord=0.144074
    2  1           NACA 16-series Chord=0.4875 IdealCl=0.2 ThickChord=0.03
  Chord along r/R (cubic Bezier): 0.1: 0.08, 0.266667: 0.15, 0.433333: 0.2, 0.6: 0.2, 0.716667: 0.2, 0.833333: 0.2, 0.95: 0.2, 0.966667: 0.2, 0.983333: 0.2, 1: 0.13
  Twist along r/R (PCHIP): 0.1: 46.75, 0.75: 20, 1: 13
  Thick along r/R (cubic Bezier): 0.1: 0.5, 0.166667: 0.3, 0.233333: 0.225, 0.3: 0.2, 0.4: 0.125, 0.5: 0.115, 0.6: 0.1, 0.733333: 0.075, 0.866667: 0.055, 1: 0.03
  CLI along r/R (cubic Bezier): 0.1: 0, 0.2: 0.7, 0.3: 0.7, 0.4: 0.7, 0.466667: 0.7, 0.533333: 0.7, 0.6: 0.7, 0.733333: 0.7, 0.866667: 0.7, 1: 0.2

Custom "rspin", child of "rprop"
  location (X Y Z) 30 7 0.75, rotation 0 0 0
  bounding box size 1.5 1.5 1.5
  Design: Diameter=1.5 Height=1.5
  custom script Cone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

Wing "tail"
  location (X Y Z) 27.5 0 4.73913, rotation 0 0 0
  symmetric about XZ
  bounding box size 2.99622 16.7159 7.9475
  totals: TotalSpan=28 TotalProjectedSpan=16.6143 TotalChord=2.225 TotalArea=68.7188 TotalAR=4.0169 RelativeTwistFlag=1
  root: chord 3, twist -3, NACA 4-series Camber=0 CamberLoc=0.2 ThickChord=0.1
  sections:
    n  Span  Root_Chord  Tip_Chord  Area      Sweep  Sweep_Location  Dihedral  Twist  Twist_Location  tip airfoil
    1  5.5   3           3          16.5      0      0               0         0      0.25            as above
    2  1     3           2.25       2.625     0      0               -30       0      0.25            as above
    3  3.75  2.25        2.25       8.4375    0      0               -75       0      0.25            as above
    4  3     2.25        1.625      5.8125    15     0               -75       0      0.25            as above
    5  0.75  1.625       1          0.984375  42     0               -75       0      0.25            as above

Fuselage "leftfuse"
  location (X Y Z) 0 -7 0, rotation 0 0 0
  bounding box size 30 4.04928 4.06144
  Design: Length=30
  cross sections:
    n  XLocPercent  YLocPercent  ZLocPercent  shape
    0  0            0            0.0185185    point
    1  0.125        0            0.0462963    general fuselage BotStr=1.5 BotTanAngle=60 CornerRad=0 Height=3.7 LowStr=0.83 MaxWidthLoc=-0.375 TopStr=0.83 TopTanAngle=50 UpStr=0.83 Width=3.7
    2  0.25         0            0.0416667    general fuselage BotStr=1.5 BotTanAngle=60 CornerRad=0 Height=3.1 LowStr=0.83 MaxWidthLoc=-0.375 TopStr=0.83 TopTanAngle=50 UpStr=0.83 Width=3.5
    3  0.5          0            0.03         general fuselage BotStr=1.5 BotTanAngle=60 CornerRad=0 Height=2 LowStr=0.83 MaxWidthLoc=-0.25 TopStr=0.83 TopTanAngle=60 UpStr=0.83 Width=2.5
    4  0.75         0            0.03         as above
    5  1            0            0.03         as above

Propeller "lprop"
  location (X Y Z) 30.5 -7 0.75, rotation 0 0 0
  bounding box size 0.370302 6.93829 7.27972
  Design: Diameter=7.5 NumBlade=5 Beta34=20 UseBeta34Flag=1 Feather=0 Rotate=0 Precone=0 ReverseFlag=0 FoldAngle=0 PropMode=0 AF=152.158 CLi=0.540239 Chord=0.175417 Solidity=0.279184 ConstructXoC=0.5 FeatherAxisXoC=0.5 FeatherOffsetXoC=0
  cross sections:
    n  RadiusFrac  shape
    0  0.1         ellipse Ellipse_Height=0.15 Ellipse_Width=0.3
    1  0.4         NACA 16-series Chord=0.6672 IdealCl=0.7 ThickChord=0.144074
    2  1           NACA 16-series Chord=0.4875 IdealCl=0.2 ThickChord=0.03
  blade curves as in "rprop"

Custom "lspin", child of "lprop"
  location (X Y Z) 30 -7 0.75, rotation 0 0 0
  bounding box size 1.5 1.5 1.5
  Design: Diameter=1.5 Height=1.5
  custom script Cone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

Wing "wing"
  location (X Y Z) 14 0 0.55, rotation 0 0 0
  symmetric about XZ
  bounding box size 3.99774 63.9315 1.6165
  totals: TotalSpan=64 TotalProjectedSpan=63.9315 TotalChord=3.4375 TotalArea=199.75 TotalAR=20.4617 RelativeTwistFlag=1
  root: chord 4, twist 2, NACA 4-series Camber=0.02 CamberLoc=0.4 ThickChord=0.12
  sections:
    n  Span  Root_Chord  Tip_Chord  Area    Sweep  Sweep_Location  Dihedral  Twist  Twist_Location  tip airfoil
    1  7     4           4          28      0      0               0         0      0.25            as above
    2  25    4           1.75       71.875  2      0               3         0      0.25            as above

Custom "rdisk"
  location (X Y Z) 30.5 7 0.75, rotation 0 0 0
  bounding box size 0 7.5 7.5
  Design: Diameter=7.5
  custom script Disk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

Custom "ldisk"
  location (X Y Z) 30.5 -7 0.75, rotation 0 0 0
  bounding box size 0 7.5 7.5
  Design: Diameter=7.5
  custom script Disk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

VSPAERO settings: Sref=56.7 bref=14 cref=4.05 Xcg=0 Ycg=0 Zcg=0 AlphaStart=0 AlphaEnd=10 AlphaNpts=1 BetaStart=0 BetaEnd=0 BetaNpts=1 MachStart=0.2 MachEnd=0 MachNpts=1 ReCref=1e+07 Vinf=100 Rho=0.002377
