OpenVSP model (file version 5), 5 components.
Geometry view with OpenVSP parameter names; values to 6 digits, angles in degrees, lengths in the model's unit.
Overall bounding box: X_Min=-0.55 X_Len=1.1 Y_Min=-0.185 Y_Len=0.37 Z_Min=0 Z_Len=0.66

Wing "body"
  location (X Y Z) 0.55 0 0.5, rotation 90 0 90
  bounding box size 1.1 0.26 0.16
  totals: TotalSpan=1.1 TotalProjectedSpan=1.1 TotalChord=0.16 TotalArea=0.176 TotalAR=6.875
  root: chord 0.16, twist 0, super ellipse Super_Height=0.26 Super_M=4 Super_MaxWidthLoc=0 Super_N=2 Super_Width=0.16
  sections:
    n  Span  Root_Chord  Tip_Chord  Area   Sweep  Sweep_Location  Dihedral  Twist  Twist_Location  tip airfoil
    1  1.1   0.16        0.16       0.176  0      0               0         0      0.25            as above

Wing "front_thighs"
  location (X Y Z) 0.4 0.14 0.3, rotation 90 0 0
  symmetric about XZ
  bounding box size 0.105 0.37 0.35
  totals: TotalSpan=0.7 TotalProjectedSpan=0.7 TotalChord=0.09 TotalArea=0.063 TotalAR=7.77778
  root: chord 0.075, twist 0, super ellipse Super_Height=0.075 Super_M=4 Super_MaxWidthLoc=0 Super_N=2 Super_Width=0.075
  sections:
    n  Span  Root_Chord  Tip_Chord  Area    Sweep  Sweep_Location  Dihedral  Twist  Twist_Location  tip airfoil
    1  0.35  0.075       0.105      0.0315  0      0.5             0         0      0.25            super ellipse Super_Height=0.09 Super_M=4 Super_MaxWidthLoc=0 Super_N=2 Super_Width=0.105

Wing "back_thighs"
  location (X Y Z) -0.5 0.14 0.3, rotation 90 0 0
  symmetric about XZ
  bounding box size 0.105 0.37 0.35
  totals: TotalSpan=0.7 TotalProjectedSpan=0.7 TotalChord=0.09 TotalArea=0.063 TotalAR=7.77778
  root: chord 0.075, twist 0, super ellipse Super_Height=0.075 Super_M=4 Super_MaxWidthLoc=0 Super_N=2 Super_Width=0.075
  sections:
    n  Span  Root_Chord  Tip_Chord  Area    Sweep  Sweep_Location  Dihedral  Twist  Twist_Location  tip airfoil
    1  0.35  0.075       0.105      0.0315  0      0.5             0         0      0.25            super ellipse Super_Height=0.09 Super_M=4 Super_MaxWidthLoc=0 Super_N=2 Super_Width=0.105

Wing "front_calves"
  location (X Y Z) 0.4 0.14 0, rotation 90 0 0
  symmetric about XZ
  bounding box size 0.075 0.355 0.3
  totals: TotalSpan=0.6 TotalProjectedSpan=0.6 TotalChord=0.0575 TotalArea=0.0345 TotalAR=10.4348
  root: chord 0.04, twist 0, super ellipse Super_Height=0.04 Super_M=4 Super_MaxWidthLoc=0 Super_N=2 Super_Width=0.04
  sections:
    n  Span  Root_Chord  Tip_Chord  Area     Sweep  Sweep_Location  Dihedral  Twist  Twist_Location  tip airfoil
    1  0.3   0.04        0.075      0.01725  0      0.5             0         0      0.25            super ellipse Super_Height=0.075 Super_M=4 Super_MaxWidthLoc=0 Super_N=2 Super_Width=0.075

Wing "back_calves"
  location (X Y Z) -0.5 0.14 0, rotation 90 0 0
  symmetric about XZ
  bounding box size 0.075 0.355 0.3
  totals: TotalSpan=0.6 TotalProjectedSpan=0.6 TotalChord=0.0575 TotalArea=0.0345 TotalAR=10.4348
  root: chord 0.04, twist 0, super ellipse Super_Height=0.04 Super_M=4 Super_MaxWidthLoc=0 Super_N=2 Super_Width=0.04
  sections:
    n  Span  Root_Chord  Tip_Chord  Area     Sweep  Sweep_Location  Dihedral  Twist  Twist_Location  tip airfoil
    1  0.3   0.04        0.075      0.01725  0      0.5             0         0      0.25            super ellipse Super_Height=0.075 Super_M=4 Super_MaxWidthLoc=0 Super_N=2 Super_Width=0.075
